units           lj
atom_style      full
dimension       3
boundary        p p p
timestep        0.005

read_data       packed.data

bond_style      fene
bond_coeff      * 30.0 1.5 1.0 1.0
special_bonds   fene

variable        runtime equal 1000000
variable        Temp equal 1.0
variable        velSeed equal 926458

velocity        all create ${Temp} ${velSeed}

### Output
thermo_style    custom step temp density press etotal pe ke epair spcpu
thermo          1000

###########################################################################
# Soft relaxation (to remove overlaps of particles)
######################################################################

pair_style      soft 1.0
pair_coeff      * * 0.0
variable        prefactor equal ramp(0,300)
fix             rampSoft all adapt 1 pair soft a * * v_prefactor

minimize        0.0 1.0e-8 1000 100000

fix             nvtSoft all nvt temp ${Temp} ${Temp} 0.5
run             100000
unfix           nvtSoft
unfix           rampSoft
reset_timestep  0

write_data      relaxed.data

###########################################################################
# Full LJ with Coulomb
######################################################################

# Cutoffs and parameters:
# - Values: Marcel Verkade's Bachelor Thesis
# - Mapping to atom groups: Patrick Onck's paper
# - 1: aliphatic, 2: aromatic, 3: anion, 4: cation
# pair_style	lj/cut/coul/cut <lj_cut_global> <coul_cut_global>
# pair_coeff	<type_1>  <type_2>  <eps>  <sigma>  <r_cut_lj>  <r_cut_coul>

# Problem: Onck's model is much more complex, and Marcel has no sigma reported
# Using sigma=5 randomly (seems to be ~0.5 nm which is kinda what Onck has(?))

pair_style		lj/cut/coul/cut
pair_coeff		1 1 	1.0 	5.0		2.50 	10.0
pair_coeff		1 2 	1.0 	5.0		2.50 	10.0
pair_coeff		1 3 	1.0 	5.0		1.12 	10.0
pair_coeff		1 4 	1.0 	5.0		1.12 	10.0
pair_coeff		2 2 	1.0 	5.0		2.50 	10.0
pair_coeff		2 3 	1.0 	5.0		1.12 	10.0
pair_coeff		2 4 	1.0 	5.0		2.50 	10.0
pair_coeff		3 3 	1.0 	5.0		1.12 	10.0
pair_coeff		3 4 	1.0 	5.0		2.50 	10.0
pair_coeff		4 4 	1.0 	5.0		1.12 	10.0


fix             noDrift all momentum 10 linear 1 1 1
fix             nvt1 all nvt temp ${Temp} ${Temp} 0.5
dump            1 all custom 1000 self_assemble.lammpstrj id type xu yu zu vx vy vz

run             ${runtime}

write_data      assembled.data nofix nocoeff
